// SBML level 3 version 2

model bhagwat2026()
  // Bhagwat2026_Yeast_Ethanol_Isobutanol
  // This the model from the article: A biochemically structured model for Saccharomyces cerevisiae. Lei F, Rotbøll M, Jørgensen SB. J Biotechnol. 2001 Jul 12;88(3):205-21. PMID: 11434967 ,DOI: 10.1016/S0168-1656(01)00269-300269-3)
  // Abstract: A biochemically structured model for the aerobic growth of Saccharomyces cerevisiae on glucose and ethanol is presented. The model focuses on the pyruvate and acetaldehyde branch points where overflow metabolism occurs when the growth changes from oxidative to oxido-reductive. The model is designed to describe the onset of aerobic alcoholic fermentation during steady-state as well as under dynamical conditions, by triggering an increase in the glycolytic flux using a key signalling component which is assumed to be closely related to acetaldehyde. An investigation of the modelled process dynamics in a continuous cultivation revealed multiple steady states in a region of dilution rates around the transition between oxidative and oxido-reductive growth. A bifurcation analysis using the two external variables, the dilution rate, D, and the inlet concentration of glucose, S(f), as parameters, showed that a fold bifurcation occurs close to the critical dilution rate resulting in multiple steady-states. The region of dilution rates within which multiple steady states may occur depends strongly on the substrate feed concentration. Consequently a single steady state may prevail at low feed concentrations, whereas multiple steady states may occur over a relatively wide range of dilution rates at higher feed concentrations.
  // This model originates from BioModels Database: A Database of Annotated Published Models. It is copyright (c) 2005-2010 The BioModels Team. For more information see the terms of use . To cite BioModels Database, please use Le Novère N., Bornstein B., Broicher A., Courtot M., Donizelli M., Dharuri H., Li L., Sauro H., Schilstra M., Shapiro B., Snoep J.L., Hucka M. (2006) BioModels Database: A Free, Centralized Database of Curated, Published, Quantitative Kinetic Models of Biochemical and Cellular Systems Nucleic Acids Res., 34: D689-D691.
  // biomodels.db:MODEL1003250000 biomodels.db:BIOMD0000000245
  // isDescribedBy pubmed:11434967
  // hasTaxon taxonomy:4932
  // hasVersion kegg.pathway:sce00020 kegg.pathway:sce00010 GO:0006006 GO:0006099
  // hasProperty mamo:MAMO_0000046
  // model units - substance: substance, time: time_unit, volume: volume

  // Compartments:
  compartment env = 1; env is "environment";  // isVersionOf GO:0005576
  compartment cell;  // GO:0005623

  // Species:
  species s_glu in env = 15/env; s_glu is "Glucose";  // CHEBI:17234 kegg.compound:C00293
  species s_pyr in env = 0; s_pyr is "Pyruvate";  // CHEBI:15361 kegg.compound:C00022
  species s_acetate in env = 0; s_acetate is "Acetate";  // CHEBI:40480 kegg.compound:C00033
  species s_acetald in env = 0; s_acetald is "Acetaldehyde";  // CHEBI:15343 kegg.compound:C00084
  species s_EtOH in env = 0;  // CHEBI:16236 kegg.compound:C00469
  species x in env = 0.002/env; x is "BM";
  species $a in env; a is "BM(active)";
  species $AcDH in env; AcDH is "BM(AcDH)";
  species $CO2 in env = 0;  // CHEBI:16526 kegg.compound:C00011
  species $Red in env = 0; Red is "Red. Equ. (NADH)";  // CHEBI:16908 kegg.compound:C00004
  species $S_f in env = 15; S_f is "Glucose(feed)";  // hasVersion CHEBI:17234 kegg.compound:C00293
  species s_AL in env = 0;
  species s_DHI in env = 0;
  species s_KIV in env = 0;
  species s_isobutald in env = 0; s_isobutald is "Isobutyraldehyde";  // CHEBI:48943 kegg.compound:C22919
  species s_IBO in env = 0; s_IBO is "Isobutanol";

  // Parameters:
  X_a = 0.1 dimensionless;
  X_AcDH = 0.0075 dimensionless;
  qO2 has mmole_per_g_per_h;
  is_aerobic = 1 dimensionless;
  qCO2 has mmole_per_g_per_h;
  k_2 = 0.501 g_per_l_per_h;
  K_2 = 2e-5 g_per_l;
  K_2i = 0.101 l_per_g;
  k_5 = 0.0104 g_per_l_per_h;
  K_5 = 0.0102 g_per_l;
  k_5e = 0.775 g_per_l_per_h;
  K_5e = 0.1 g_per_l;
  K_5i = 440 l_per_g;
  k_7 = 1.203 g_per_l_per_h;
  k_7ie = 0.04 l_per_g;
  k_7ia = 0.12 l_per_g;
  k_7ii = 0.15 l_per_g;
  K_7 = 0.0101 g_per_l;
  k_8 = 0.589 g_per_l_per_h;
  OTR_max has mmole_per_l_per_h;
  kLa = 200 per_h;
  C_O2_sat = 0.2 mmole_per_l;
  OUR_gated has mmole_per_l_per_h;
  anaerobic_growth_mult = 0.75 dimensionless;
  OUR_committed has mmole_per_l_per_h;
  OUR_demand has mmole_per_l_per_h;
  f_O2 has dimensionless;
  conc_glu_feed_spike = 600 g_per_l;
  tot_vol_glu_feed_added = 0 volume;
  target_conc_glu_spike = 100 g_per_l;
  n_glu_spikes = 0 dimensionless;
  k_1l = 1.43 g_per_l_per_h;
  K_1l = 0.94 g_per_l;
  k_1h = 0.584 g_per_l_per_h;
  K_1h = 0.0116 g_per_l;
  k_1e = 47.1 g_per_l_per_h;
  K_1i = 14.2 l_per_g;
  K_1e = 0.12 g_per_l;
  k_1ie = 0.02 l_per_g;
  k_1ia = 0.06 l_per_g;
  k_1ii = 0.075 l_per_g;
  k_3 = 5.81 g_per_l_per_h;
  K_3 = 5e-7 g_per_l;
  k_4 = 4.8 g_per_l_per_h;
  k_4ie = 0.04 l_per_g;
  k_4ia = 0.12 l_per_g;
  k_4ii = 0.15 l_per_g;
  K_4 = 0.000264 g_per_l;
  k_6 = 2.82 g_per_l_per_h;
  k_6r = 0.0125 dimensionless;
  K_6 = 0.034 g_per_l;
  K_6e = 0.057 dimensionless;
  k_6ia = 0.06 l_per_g;
  k_6ii = 0.075 l_per_g;
  k_9 = 0.008 g_per_l_per_h;
  K_9 = 1e-6 g_per_l;
  k_9e = 0.0751 g_per_l_per_h;
  K_9e = 13 g_per_l;
  K_9i = 25 l_per_g;
  k_9c = 0.00399 g_per_l_per_h;
  k_10 = 0.06 g_per_l_per_h;
  k_10ie = 0.04 l_per_g;
  P_10e = 100 g_per_l;
  k_10ia = 0.12 l_per_g;
  P_10a = 5 g_per_l;
  k_10ii = 0.15 l_per_g;
  P_10i = 25 g_per_l;
  k_11 = 0.02 g_per_l_per_h;
  D = 0 per_h; D is "Dilutionrate";
  k_13 = 0 g_per_l_per_h;
  K_13 = 0.1 g_per_l;
  k_14 = 0 g_per_l_per_h;
  K_14 = 0.017 g_per_l;
  k_15 = 0 g_per_l_per_h;
  K_15 = 0.08 g_per_l;
  k_16 = 0.02115 g_per_l_per_h;
  K_16 = 0.27 g_per_l;
  k_17 = 0.1077 g_per_l_per_h;
  k_17r = 0.00025 dimensionless;
  K_17 = 0.0086 g_per_l;
  K_17e = 0.02 dimensionless;
  k_17ia = 0.06 l_per_g;
  k_17ie = 0.02 l_per_g;
  max_n_glu_spikes = 5 dimensionless;
  threshold_conc_glu_spike = 10 g_per_l;
  last_vol_glu_feed_added = 0 volume;
  glucose_feed_spikeDelay = 0 time_unit;
  glucose_feed_spike_dissolveDelay = 0.001 time_unit;
  stage_1_max_time = INF; stage_1_max_time has time_unit;
  stage_1_max_x = INF; stage_1_max_x has g_per_l;
  k_16r = 0 dimensionless;
  K_16i = 0 dimensionless;
  k_16ia = 0 l_per_g;
  k_16ie = 0 l_per_g;

  // Assignment rules:
  a := x*X_a;
  AcDH := x*X_AcDH;
  cell := x*env*0.0015;
  qO2 := is_aerobic*(1000/32)*(0.178*r1 + 0.908*TCA_pyruvate + 0.363*r4 + 1.066*TCA_acetate - 0.363*ADH - 0.222*r17 - 0.121*r14 + 0.063*r7 + 0.214*BM_growth_acetate)/(x*env);
  qCO2 := 1000/44.01*(1.499*TCA_pyruvate + 0.5*Pyruvate_Dehydrogenase + 1.466*TCA_acetate + 0.127*r7 + 0.325*BM_growth_acetate + 0.25*r13 + 0.379*r16)/(x*env);
  qO2_TCA_growth_only := 1000/32*(0.908*TCA_pyruvate + 1.066*TCA_acetate + 0.063*r7 + 0.214*BM_growth_acetate)/(x*env);
  v2_0 := k_2*s_pyr/((s_pyr + K_2)*(K_2i*s_glu + 1))*a*env;
  v5_0 := (k_5*s_acetate/(s_acetate + K_5) + k_5e*s_acetate/((s_acetate + K_5e)*(1 + K_5i*s_glu)))*a*env;
  v7_0 := k_7*s_glu*2.71828^(-k_7ie*s_EtOH)*2.71828^(-k_7ia*s_acetate)*2.71828^(-k_7ii*s_IBO)/(s_glu + K_7)*a*env;
  v8_0 := k_8*s_acetate/((s_acetate + K_5e)*(1 + K_5i*s_glu))*a*env;
  OTR_max := kLa*C_O2_sat;
  OUR_gated := 1000/32*(0.908*v2_0 + 1.066*v5_0 + 0.214*v8_0 + (1 - anaerobic_growth_mult)*0.063*v7_0)/env;
  OUR_committed := 1000/32*anaerobic_growth_mult*0.063*v7_0/env;
  OUR_demand := OUR_gated + OUR_committed;
  f_O2 := is_aerobic*piecewise(1, OUR_demand <= OTR_max, 0, OUR_committed >= OTR_max, (OTR_max - OUR_committed)/OUR_gated);
  tot_mass_glu := conc_glu_feed_spike*tot_vol_glu_feed_added + target_conc_glu_spike*(env - tot_vol_glu_feed_added);
  y_EtOH_glu_added := s_EtOH*env/tot_mass_glu;
  y_EtOH_glu_consumed := s_EtOH*env/(tot_mass_glu - s_glu*env);
  y_IBO_glu_added := s_IBO*env/tot_mass_glu;
  y_IBO_glu_consumed := s_IBO*env/(tot_mass_glu - s_glu*env);
  y_EtOH_IBO_glu_added := y_EtOH_glu_added + y_IBO_glu_added;
  prod_EtOH := s_EtOH/time;
  curr_n_glu_spikes := n_glu_spikes;
  curr_env := env;
  curr_tot_vol_glu_feed_added := tot_vol_glu_feed_added;
  curr_a := a;

  // Rate rules:
  X_a' = ((0.732*r7 + 0.619*BM_growth_acetate)*(1 - X_a) - Acdh_production - r10)/(x*env);
  X_AcDH' = (Acdh_production - Acdh_degradation - (0.732*r7 + 0.619*BM_growth_acetate)*X_AcDH)/(x*env);

  // Reactions:
  r1: s_glu => 0.978 s_pyr + 0.178 $Red; (k_1l*s_glu/(s_glu + K_1l) + k_1h*s_glu/(s_glu + K_1h) + k_1e*s_acetald*s_glu/(s_glu*(K_1i*s_acetald + 1) + K_1e))*2.71828^(-k_1ie*s_EtOH)*2.71828^(-k_1ia*s_acetate)*2.71828^(-k_1ii*s_IBO)*a*env;  // modifiers: s_acetate, s_acetald, s_EtOH, s_IBO, a
  TCA_pyruvate: s_pyr => 1.499 $CO2 + 0.908 $Red; f_O2*v2_0; TCA_pyruvate is "TCA (pyruvate)";  // GO:0006099
  r4: s_acetald => 1.363 s_acetate + 0.363 $Red; k_4*s_acetald*2.71828^(-k_4ie*s_EtOH)*2.71828^(-k_4ia*s_acetate)*2.71828^(-k_4ii*s_IBO)/(s_acetald + K_4)*a*X_AcDH*env;  // modifiers: s_EtOH, s_IBO, a
  TCA_acetate: s_acetate => 1.446 $CO2 + 1.066 $Red; f_O2*v5_0; TCA_acetate is "TCA (acetate)";  // GO:0006099
  ADH: s_acetald + 0.363 $Red -> 1.045 s_EtOH; k_6*(s_acetald - k_6r*s_EtOH)/(s_acetald + K_6 + K_6e*s_EtOH)*2.71828^(-k_6ia*s_acetate)*2.71828^(-k_6ii*s_IBO)*a*env;  // modifiers: s_acetate, s_IBO, a; hasVersion kegg.reaction:R00754; isVersionOf ec-code:1.1.1.1 GO:0004022
  r17: s_isobutald + 0.222 $Red -> 1.028 s_IBO; k_17*(s_isobutald - k_17r*s_IBO)/(s_isobutald + K_17 + K_17e*s_IBO)*2.71828^(-k_17ia*s_acetate)*2.71828^(-k_17ie*s_EtOH)*a*env;  // modifiers: s_acetate, s_EtOH, a
  r14: s_AL + 0.121 $Red => 1.015 s_DHI; k_14*s_AL/(K_14 + s_AL)*a*env;  // modifiers: a
  r7: s_glu => 0.732 x + 0.127 $CO2 + 0.063 $Red; (anaerobic_growth_mult + (1 - anaerobic_growth_mult)*f_O2)*v7_0;
  BM_growth_acetate: s_acetate => 0.619 x + 0.325 $CO2 + 0.214 $Red; f_O2*v8_0; BM_growth_acetate is "BM growth (acetate)";  // isVersionOf GO:0016049 GO:0008283
  Pyruvate_Dehydrogenase: s_pyr => 0.5 s_acetald + 0.33 $CO2; k_3*s_pyr^4/(s_pyr^4 + K_3)*a*env;  // modifiers: a; hasVersion ec-code:1.2.4.1 ec-code:2.3.1.12; isVersionOf kegg.reaction:R00209 GO:0004738
  r13: s_pyr => 0.75 s_AL + 0.25 $CO2; k_13*s_pyr/(K_13 + s_pyr)*a*env;  // modifiers: a
  r16: s_KIV => 0.621 s_isobutald + 0.379 $CO2; k_16*s_KIV/(s_KIV + K_16)*a*env;  // modifiers: a
  Acdh_production: $a => $AcDH; ((k_9*s_glu/(s_glu + K_9) + k_9e*s_EtOH/(s_EtOH + K_9e))/(K_9i*s_glu + 1) + k_9c*s_glu/(s_glu + K_9))*a*env;  // modifiers: s_EtOH, s_glu; isVersionOf GO:0006412
  r10: $a => ; k_10*piecewise(2.71828^(k_10ie*(s_EtOH - P_10e)), s_EtOH > P_10e, 1)*piecewise(2.71828^(k_10ia*(s_acetate - P_10a)), s_acetate > P_10a, 1)*piecewise(2.71828^(k_10ii*(s_IBO - P_10i)), s_IBO > P_10i, 1)*a*env;  // modifiers: s_acetate, s_EtOH, s_IBO
  Acdh_degradation: $AcDH => ; k_11*AcDH*env;  // isVersionOf GO:0030163
  s_glu_in: $S_f => s_glu; S_f*D*env; s_glu_in is "Glucose inflow";
  s_glu_out: s_glu => ; s_glu*D*env; s_glu_out is "Glucose outflow";
  s_pyr_out: s_pyr => ; s_pyr*D*env; s_pyr_out is "Pyruvate outflow";
  s_acetate_out: s_acetate => ; s_acetate*D*env; s_acetate_out is "Acetate outflow";
  s_acetald_out: s_acetald => ; s_acetald*D*env; s_acetald_out is "Acetaldehyde outflow";
  s_EtOH_out: s_EtOH => ; s_EtOH*D*env; s_EtOH_out is "EtOH outflow";
  a_out: $a => ; a*D*env; a_out is "active BM outflow";
  x_out: x => ; x*D*env; x_out is "BM outflow";
  AcDH_out: $AcDH => ; AcDH*D*env; AcDH_out is "AcDH BM outflow";
  r15: s_DHI => 0.866 s_KIV; k_15*s_DHI/(K_15 + s_DHI)*a*env;  // modifiers: a

  // Unit definitions:
  unit g_per_l = gram / litre; g_per_l is "gram per liter";
  unit volume = litre; volume is "liter";
  unit time_unit = 3600 second; time_unit is "hours";
  unit per_h = 1 / (3600 second); per_h is "per hour";
  unit mmole_per_l = 1e-3 mole / litre; mmole_per_l is "mmole per liter";
  unit mmole_per_l_per_h = 1e-3 mole / (litre * 3600 second); mmole_per_l_per_h is "mmole per liter per hour";
  unit mmole_per_g_per_h = 1e-3 mole / (3600 second * gram); mmole_per_g_per_h is "mmole per gram BM per hour";
  unit g_per_l_per_h = gram / (litre * 3600 second); g_per_l_per_h is "gram per liter per hour";
  unit l_per_g = litre / gram; l_per_g is "liter per gram";
  unit substance = gram; substance is "gram";
end
